// COMSOL Multiphysics 6.4.0.293 model "Mass_Transport.mph"
// Corrosion Under an Evans Droplet
// This example simulates atmospheric general corrosion of steel under a droplet of aqueous sodium chloride solution. The model accounts for mass transport together with homogeneous reactions and atmospheric oxygen and carbon dioxide interactions. The model computes the transient and spatial distribution of species within the droplet, including passivating corrosion products formed in precipitation reactions at the electrode surface.
// Outline of the model tree

Parameters
  a = 0.0071550[m]  // Droplet radius
  b = 0.0037306[m]  // Droplet height
  c_unit = 1000[mol/m^3]  // Unit activity concentration
  cCO20 = KCO2*PCO2*1e3*0.7[mol/m^3]  // Initial concentration of CO2
  cNaCl0 = 0.5[M]  // Initial concentration of NaCl
  cO2_sol = 1.22[mM]  // Oxygen solubility
  cO20 = cO2s  // Initial oxygen concentration
  cO2s = cO2_sol*0.21*0.7  // Oxygen concentration at the drop's surface
  ctot_mdis = 1e-5[mol/m^2]  // Total molar availability per surface area and monolayer for corrosion product precipitation
  DCl = 2.03e-9[m^2/s]  // Diffusion coefficient of Cl
  DFe = 0.72e-9[m^2/s]  // Diffusion coefficient of Fe2
  DNa = 1.33e-9[m^2/s]  // Diffusion coefficient of Na
  DO2 = 1.96e-9[m^2/s]  // Diffusion coefficient of O2
  Eeq_ref_Fe = -0.47[V]  // Reference equilibrium potential for iron dissolution reaction
  Eeq_ref_O2 = 0.401[V]  // Reference equilibrium potential for oxygen reduction reaction
  i0_ref_Fe = 1[A/m^2]  // Reference exchange current density for iron dissolution reaction
  i0_ref_O2 = 1e-7[A/m^2]  // Reference exchange current density for oxygen reduction reaction
  alphaa_Fe = 1.5  // Anodic transfer coefficient for iron dissolution reaction
  alphaa_O2 = 3.5  // Anodic transfer coefficient for oxygen reduction reaction
  KCO2 = 0.0454*(1.6616-5.736e-2*(T[1/K]-273)+1.031e-3*(T[1/K]-273)^2-9.68e-6*(T[1/K]-273)^3+4.471e-8*(T[1/K]-273)^4-7.912e-11*(T[1/K]-273)^5)  // Henry's constant
  KFeCO3 = 10^6.57  // Equilibrium constant for aqueous FeCO3 dissociation
  KFeOH = 10^-9.5  // Equilibrium constant for FeOH formation
  KFeOH2 = 10^-11.1  // Equilibrium constant for second step of Fe++ hydrolysis
  kfFeCO3 = 1e7[mol/m^3/s]  // Reaction rate constant for FeCO3 precipitation
  kfFeOH2 = 1e6[mol/m^3/s]  // Reaction rate constant for FeOH2 precipitation
  KspFeCO3 = 10^-10.7  // Equilibrium constant, FeCO3 dissolution
  KspFeOH2 = 8e-16  // Equilibrium constant, FeOH2 dissolution
  M_FeCO3 = 115.854[g/mol]  // Molecular weight of FeCO3
  M_FeOH2 = 89.86[g/mol]  // Molecular weight of FeOH2
  PCO2 = 400[ppm]  // Partial pressure of CO2 in bar
  phil0 = 0.5[V]  // Initial electrolyte potential
  rho_FeCO3 = 4.03[g/cm^3]  // Density of FeCO3
  rho_FeOH2 = 3.4[g/cm^3]  // Density of FeOH2
  T = 298 [K]  // Temperature
  zCl = -1  // Charge number of CO3
  zFe = 2  // Charge number of Fe
  zFeOH = 1  // Charge number of FeOH
  zNa = 1  // Charge number of Na
  k_O2 = 1000[m/s]  // Mass Transfer Coefficient O2
  k_CO2 = 0.1[m/s]  // Mass Transfer Coefficient CO2

Variables
  var1 "Variables 1"
    rFeCO3 = kfFeCO3*b*max(aqt.c3_Fe*aqt.c1_H2CO3[M^-2]-KspFeCO3,0)  // Reaction rate for FeCO3 precipitation
    rFeOH2 = kfFeOH2*b*max(aqt.c3_Fe*aqt.cOH^2[M^-3]-KspFeOH2,0)  // Reaction rate for FeOH2 precipitation
    theta = 1-exp(-aqt.es1.ctot/ctot_mdis)  // Corrosion-product coverage degree

Geometry
  geom1 "Geometry 1" (2D axisymmetric, length unit m)
    e1: Ellipse | semiaxes = {a, b}; angle = 90; iscircularsectorold = on
    fin: Finalize "Form Union" | symmetriccoord = 8

Physics
  aqt: AqueousElectrolyteTransport on all domains
    dependent variable electrolytePotential
    el1: Electrolyte (default)
      carb1: CarbonicAcid on all domains
      amph1: Ampholyte "Ampholyte - Fe" on all domains
        speciesname = Fe
        z0 = 0
        pKa = {-log10(KFeOH), -log10(KFeOH2)}
        D = DFe
      uns1: UnchargedSpecies "Uncharged Species - O2" on all domains | speciesname = O2; D = DO2
      fds1: FullyDissociatedSpecies "Fully Dissociated Species - Na" on all domains | speciesname = Na; z = zNa; D = DNa
      fds2: FullyDissociatedSpecies "Fully Dissociated Species - Cl" on all domains | speciesname = Cl; z = zCl; D = DCl
      coms1: ComplexSpecies "Complex Species - FeCO3" on all domains
        item.Keq = KFeCO3
        isActive = {1, 0, 0, 0, 0, 0, 1, 0, 0, 0}
        nu = {-1, 0, 0, 0, 0, 0, -1, 0, 0, 0}
        D_comp = DFe
    init1: InitialValues (default)
      initphil = phil0
      initc_H2CO3 = cCO20
      initc_O2 = cO20
      initc_Na = cNaCl0
      initc_Cl = cNaCl0
    nflx1: NoFlux (default)
    axi1: AxialSymmetry (default)
    flux1: FluxBoundary "Flux 1" on boundaries 3 | N0_4_H2CO3 = -k_CO2*(aqt.c4_H2CO3-cCO20); N0_O2 = -k_O2*(aqt.c_O2-cO2s)
    es1: ElectrodeSurface on boundaries 2
      DisDepSpeciesName = {FeOH2, FeCO3}
      Vm = {M_FeOH2/rho_FeOH2, M_FeCO3/rho_FeCO3}
      c0 = {0[mol/m^2], 0[mol/m^2]}
      er1: ElectrodeReaction "Electrode Reaction - Fe Dissolution" (default)
        nu0_3_Fe = -1
        Eeq_ref = Eeq_ref_Fe
        i0_ref = i0_ref_Fe*(1-theta)
        alphaa = alphaa_Fe
      er2: ElectrodeReaction "Electrode Reaction - Oxygen Reduction" on all boundaries
        nu0_O2 = -1
        nu0OH = 4
        Eeq_ref = Eeq_ref_O2
        cref_O2 = cO2_sol
        i0_ref = i0_ref_O2
        alphaa = alphaa_O2
      reac1: Reaction "Reaction - FeOH2" on all boundaries | RN = rFeOH2; nu0_3_Fe = -1; nu0OH = -2; nudep = {1, 0}
      reac2: Reaction "Reaction - FeCO3" on all boundaries | RN = rFeCO3; nu0_1_H2CO3 = -1; nu0_3_Fe = -1; nudep = {0, 1}

Mesh
  mesh1 "Mesh 1"
    ftri1: FreeTri "Free Triangular 1" on remaining entities | smoothmaxiter = 4; smoothmaxdepth = 4
      dis1: Distribution on boundaries 2, 3 | type = predefined; elemcount = 200; elemratio = 10

Studies
  std1 "Study 1"
    cdi: CurrentDistributionInitialization
    time: Transient "Time Dependent" | tlist = range(0,10,300); initialtime = 0

Solver configurations
  sol1 "Solution 1" (study std1)
    v1: Variables "Dependent Variables 1"
    s1: Stationary "Stationary Solver 1"
      fc1: FullyCoupled
      d1: Direct "Direct (aqt)"
    su1: StoreSolution "Solution Store 1"
    v2: Variables "Dependent Variables 2"
    t1: Time "Time-Dependent Solver 1"
      fc1: FullyCoupled
      d1: Direct "Direct (aqt)"
  sol2 "Solution Store 1" (study std1)

Datasets
  dset1: Solution | solution = sol1
  dset2: Solution | solution = sol2
  rev1: Revolve2D "Revolution 2D 1" | data = dset1
  rev2: Revolve2D "Revolution 2D 2" | data = dset1; startangle = -90; revangle = 225

Plots
  pg1: PlotGroup2D "pH (aqt)" | data = dset1
    surf1: Surface | expr = aqt.pH
  pg2: PlotGroup2D "Electrolyte Conductivity (aqt)" | data = dset1
    surf1: Surface | expr = aqt.sigmal
  pg3: PlotGroup2D "Electrolyte Potential (aqt)" | data = dset1
    surf1: Surface | expr = aqt.phil
    arws1: ArrowSurface | expr = {aqt.Ilr, aqt.Ilz}
  pg4: PlotGroup2D "Molar Concentration - H2CO3 (aqt)" | data = dset1
    surf1: Surface | expr = aqt.c_H2CO3
    arws1: ArrowSurface | expr = {aqt.Ilr, aqt.Ilz}
  pg5: PlotGroup2D "Molar Concentration - Fe (aqt)" | data = dset1
    surf1: Surface | expr = aqt.c_Fe
    arws1: ArrowSurface | expr = {aqt.Ilr, aqt.Ilz}
  pg6: PlotGroup2D "Molar Concentration - O2 (aqt)" | data = dset1
    surf1: Surface | expr = aqt.c_O2
    arws1: ArrowSurface | expr = {aqt.Ilr, aqt.Ilz}
  pg7: PlotGroup2D "Molar Concentration - Na (aqt)" | data = dset1
    surf1: Surface | expr = aqt.c_Na
    arws1: ArrowSurface | expr = {aqt.Ilr, aqt.Ilz}
  pg8: PlotGroup2D "Molar Concentration - Cl (aqt)" | data = dset1
    surf1: Surface | expr = aqt.c_Cl
    arws1: ArrowSurface | expr = {aqt.Ilr, aqt.Ilz}
  pg9: PlotGroup2D "Total Corrosion Product Precipitation" | data = dset1
    line1: Line | expr = aqt.es1.ctot; descr = Total molar concentration
  pg10: PlotGroup3D "Precipitated FeCO3 Fraction, 3D" | data = rev1
    surf1: Surface | expr = comp1.aqt.es1.ctot
    str1: Streamline
      revcoordsys = cylindrical
      expr = {aqt.Ilr, aqt.Ilphi, aqt.Ilz}
      linetype = tube
      tuberadiusscale = 2.5e-5
      pointtype = arrow
      arrowlength = logarithmic
      col1: Color "Color Expression 1" | expr = aqt.IlMag; descr = Electrolyte current density magnitude
    surf2: Surface | expr = 1
      sel1: Selection on domains 1
      tran1: Transparency | transparency = 0.85; expr = aqt.pH
      mtrl1: MaterialAppearance | appearance = custom; family = water
  pg11: PlotGroup3D "pH, 3D" | data = rev2
    surf1: Surface | expr = aqt.pH
  pg12: PlotGroup1D "Local Current Density and Coverage"
    data = dset1
    xlabel = Spatial coordinates, r-component (m)
    ylabel = Local current density (A/m<sup>2</sup>)
    yseclabel = Corrosion-product coverage degree
    lngr1: LineGraph on boundaries 2 | expr = aqt.es1.er1.iloc; xdata = expr; xdataexpr = r; legends = Iron dissolution
    lngr2: LineGraph on boundaries 2 | expr = aqt.es1.er2.iloc; xdata = expr; xdataexpr = r; legends = Oxygen reduction
    lngr3: LineGraph on boundaries 2 | expr = aqt.itot; xdata = expr; xdataexpr = r; legends = Total
    lngr4: LineGraph on boundaries 2 | expr = theta; xdata = expr; xdataexpr = r; legends = Coverage
  pg13: PlotGroup3D "Concentration, Fe, 3D" | data = rev2
    surf1: Surface | expr = aqt.c3_Fe
  pg14: PlotGroup3D "Concentration, CO2, 3D" | data = rev2
    surf1: Surface | expr = aqt.c4_H2CO3; descr = Dissociated species concentration, CO2(aq)

Exports
  anim1: Animation | target = player